n := transpose([1, 2, 3, 4, 5, 6, 7, 8, 9, 10, 11, 12])
Period := 1/32768
Period = 3.05176e-5
Module := 2^n
Time := Period*Module
Freq := 32768/Module
Freq = [16384; 8192; 4096; 2048; 1024; 512; 256; 128; 64; 32; 16; 8]
Module = [2; 4; 8; 16; 32; 64; 128; 256; 512; 1024; 2048; 4096]
Time = [6.10352e-5; 0.00012207; 0.000244141; 0.000488281; 0.000976562; 0.00195312; 0.00390625; 0.0078125; 0.015625; 0.03125; 0.0625; 0.125]
Time*Module[1] = [0.000244141; 0.000488281; 0.000976562; 0.00195312; 0.00390625; 0.0078125; 0.015625; 0.03125; 0.0625; 0.125; 0.25; 0.5]
Time*Module[2] = [0.000488281; 0.000976562; 0.00195312; 0.00390625; 0.0078125; 0.015625; 0.03125; 0.0625; 0.125; 0.25; 0.5; 1]
Time*Module[3] = [0.000976562; 0.00195312; 0.00390625; 0.0078125; 0.015625; 0.03125; 0.0625; 0.125; 0.25; 0.5; 1; 2]
Time*Module[4] = [0.00195312; 0.00390625; 0.0078125; 0.015625; 0.03125; 0.0625; 0.125; 0.25; 0.5; 1; 2; 4]
Time*Module[5] = [0.00390625; 0.0078125; 0.015625; 0.03125; 0.0625; 0.125; 0.25; 0.5; 1; 2; 4; 8]
Time*Module[6] = [0.0078125; 0.015625; 0.03125; 0.0625; 0.125; 0.25; 0.5; 1; 2; 4; 8; 16]
Time*Module[7] = [0.015625; 0.03125; 0.0625; 0.125; 0.25; 0.5; 1; 2; 4; 8; 16; 32]
Time*Module[8] = [0.03125; 0.0625; 0.125; 0.25; 0.5; 1; 2; 4; 8; 16; 32; 64]
Time*Module[9] = [0.0625; 0.125; 0.25; 0.5; 1; 2; 4; 8; 16; 32; 64; 128]
Time*Module[10] = [0.125; 0.25; 0.5; 1; 2; 4; 8; 16; 32; 64; 128; 256]
Time*Module[11] = [0.25; 0.5; 1; 2; 4; 8; 16; 32; 64; 128; 256; 512]
# Берем вывод Q12 с первого делителя, присваиваем ему имя A
A := Time*Module[11]
A = [0.25; 0.5; 1; 2; 4; 8; 16; 32; 64; 128; 256; 512]
# Подаем сигнал А на вход второго делителя. Снимаем сигнал с вывода Q1, присваиваем ему имя B
B := A*Module[0]
C := B*Module[5]
B = [0.5; 1; 2; 4; 8; 16; 32; 64; 128; 256; 512; 1024]
1/B = [2; 1; 0.5; 0.25; 0.125; 0.0625; 0.03125; 0.015625; 0.0078125; 0.00390625; 0.00195312; 0.000976562]
C = [32; 64; 128; 256; 512; 1024; 2048; 4096; 8192; 16384; 32768; 65536]
B
# 30 секунд
#
# 1 минута
#
# 2 минуты
#
# 3 минуты
#
# 5 минут
#
# 10 минут
#
# 20 минут
#
# 30 минут
B[2] + B[3] + B[4] + B[5] = 30
B[0] = 0.5
B[1] = 1
B[3] + B[4] + B[5] + B[6] = 60
B[4] + B[5] + B[6] + B[7] = 120
B[3] + B[5] + B[6] + B[8] = 180
B[3] + B[4] + B[6] + B[9] = 300
B[4] + B[5] + B[7] + B[10] = 600
B[5] + B[6] + B[8] + B[11] = 1200
B[4] + B[9] + B[10] + B[11] = 1800
sum(B[n], n = 0 .. 11) = 2047.5
Секунды
sec := [1; 3; 7; 15; 31; 63; 127; 255; 511; 1023; 2047; 4095]*32
sec = [32; 96; 224; 480; 992; 2016; 4064; 8160; 16352; 32736; 65504; 131040]
Минуты
min := sec/60
min = [0.533333; 1.6; 3.73333; 8; 16.5333; 33.6; 67.7333; 136; 272.533; 545.6; 1091.73; 2184]
